# Oven Insulation Transient Conduction
# Given:
k_air := 33.8*10^-3 W/(m*K)
w_ss.i := 0.125 in = 0.003175 m
k_ss := 14.9 W/(m*K)
w_ss.o := 0.106 in = 0.0026924 m
k_argon := 26.8*10^-3 W/(m*K)
L_o := 10 in*(0.0254 m/in) = 0.254 m
k_ceramic := 0.06*W/(m*K)
L_i := 8 in*(0.0254 m/in) = 0.2032 m
k_foamoc := 0.27*W/(m*K)
w := 0.1 in, 0.2 in .. 4 in
T_0 := 400 °F
T_∞ := 72 °F = 295.372 K
T_i := T_∞ = 72 °F
T_f := T_0 = 477.594 K
# Using Soldering Profile; the temperature is a linear gradient from Ti to Tf.
T_avg := (T_0 + T_∞)/2
T_mid := T_avg = 236 °F
A_i := 2*12 in*6 in + 2*6 in*18 in + 2*12 in*18 in = 0.510967 m^2
A := A_i
A_o := 2*14 in*8 in + 2*8 in*20 in + 2*14 in*20 in = 0.712257 m^2
T_film.i := T_0 = 400 °F
T_film.o := T_∞ = 72 °F
ρ_ceramic := 96 kg/m^3
ρ := ρ_ceramic = 96 kg/m^3
k_ceramic := 0.05*W/(m*K)
k := k_ceramic
c_p := 1130 J/(kg*K)
Q_in := 60 W
σ := 5.6704*10^-8 W/(m^2*K^4)
σ = 5.6704e-8 kg/(s^3*K^4)
h_o := 5.719 W/(m^2*K)
# Derivation
d/dx(k*d/dx(T)) + d/dy(k*d/dy(T)) + d/dz(k*d/dz(T)) + q == ρ*c_p*d/dt(T)
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d/dx(k*d/dx(T)) + q == ρ*c_p*d/dt(T)
k*d/dx(d/dx(T)) + q == ρ*c_p*d/dt(T)
k/(ρ*c_p)*(d^2/dx^2(T)) + q == d/dt(T)
r == k_ceramic*dt/(c_p*ρ*dx^2)  # Diffusion Number
k/(ρ*c_p)*1/(2*Δx^2)*((T[x - 1, t + 1] - 2*T[x, t + 1] + T[x + 1, t + 1]) + (T[x + 1, t] - 2*T[x, t] + T[x - 1, t])) == (T[x, t + 1] - T[x, t])/Δt
0.5*r*((T[x - 1, t + 1] - 2*T[x, t + 1] + T[x + 1, t + 1]) + (T[x + 1, t] - 2*T[x, t] + T[x - 1, t])) + T[x, t] == T[x, t + 1]
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(r*T[x - 1, t + 1] - 2*r*T[x, t + 1] + r*T[x + 1, t + 1]) + (r*T[x + 1, t] - 2*r*T[x, t] + r*T[x - 1, t]) + T[x, t] == 2*T[x, t + 1]
r*T[x + 1, t] - 2*r*T[x, t] + r*T[x - 1, t] + T[x, t] == 2*T[x, t + 1] - (r*T[x - 1, t + 1] - 2*r*T[x, t + 1] + r*T[x + 1, t + 1])
r*T[x + 1, t]*(2 - 2*r)*T[x, t] + r*T[x - 1, t] == -r*T[x - 1, t + 1] + (2 + 2*r)*T[x, t + 1] - r*T[x + 1, t + 1]
0.5*r*T[x + 1, t] + (1 - r)*T[x, t] + 0.5*r*T[x - 1, t] == -0.5*r*T[x - 1, t + 1] + (1 + r)*T[x, t + 1] - 0.5*r*T[x + 1, t + 1]
AA*[T[x - 1, t]; T[x, t]; T[x + 1, t]] == BB*[T[x - 1, t + 1]; T[x, t + 1]; T[x + 1, t + 1]] + bc(t)
AA == [1 - r, 0.5*r, 0; 0.5*r, 1 - r, 0.5*r; 0, 0.5*r, 1 - r]
BB == [1 + r, -0.5*r, 0; -0.5*r, 1 + r, -0.5*r; 0, -0.5*r, 1 + r]
bc(t) == [r*T[x - 1, t]; 0; r*T[x + 1, t]]
W = 1 J/s
# Forward Euler Method (aka: Implicit Method)
L := 1 in = 0.0254 m
time := 240 s
d/dt(T) == k/(c_p*ρ)
dx := 0.1 in
dt := 5 s
disu := 1 in
timeu := 1 s
scale := 10
tscale := 0.2
diffusionNumber := k_ceramic*dt/(c_p*ρ*dx^2) = 0.357209  # If less than 0.5, then it has met the stability criteria
# Initialization
T :=
    for j ∈ 0, dt/timeu*tscale .. time/timeu*tscale
        for i ∈ 0, dx/disu*scale .. (L/disu)*scale
            T[i, j] ← T_∞
    T
T = [
    295.372, 295.372, 295.372, 295.372, 295.372, 295.372, 295.372, 295.372, 295.372, 295.372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;
    295.372, 295.372, 295.372, 295.372, 295.372, 295.372, 295.372, 295.372, 295.372, 295.372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;
    295.372, 295.372, 295.372, 295.372, 295.372, 295.372, 295.372, 295.372, 295.372, 295.372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;
    295.372, 295.372, 295.372, 295.372, 295.372, 295.372, 295.372, 295.372, 295.372, 295.372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;
    295.372, 295.372, 295.372, 295.372, 295.372, 295.372, 295.372, 295.372, 295.372, 295.372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;
    295.372, 295.372, 295.372, 295.372, 295.372, 295.372, 295.372, 295.372, 295.372, 295.372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;
    295.372, 295.372, 295.372, 295.372, 295.372, 295.372, 295.372, 295.372, 295.372, 295.372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;
    295.372, 295.372, 295.372, 295.372, 295.372, 295.372, 295.372, 295.372, 295.372, 295.372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;
    295.372, 295.372, 295.372, 295.372, 295.372, 295.372, 295.372, 295.372, 295.372, 295.372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;
    295.372, 295.372, 295.372, 295.372, 295.372, 295.372, 295.372, 295.372, 295.372, 295.372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;
    295.372, 295.372, 295.372, 295.372, 295.372, 295.372, 295.372, 295.372, 295.372, 295.372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] K
# Equation
T_lim :=
    for t ∈ 0, dt/timeu*tscale .. time/timeu*tscale
        Q_out ← σ*A*(T[L/disu*scale, t]^4 - T_∞^4) + h_o*A*(T[L/disu*scale, t] - T_∞)
        T[0, t + 1] ← T[0, t] + (k_ceramic*dt/(c_p*ρ*dx^2))*(T[1, t] - T[0, t] + Q_in*dx/(k_ceramic*A_i))
        T[L/disu*scale, t + 1] ← T[L/disu*scale, t] + (k_ceramic*dt/(c_p*ρ*dx^2))*(T[L/disu*scale - 1, t] - T[L/disu*scale, t] - Q_out*dx/(k_ceramic*A_i))
        for x ∈ dx/disu*scale, 2*dx/disu*scale .. (L/disu - dx/disu)*scale
            T[x, t + 1] ← T[x, t] + (k_ceramic*dt/(c_p*ρ*dx^2))*(T[x - 1, t] - 2*T[x, t] + T[x + 1, t])
    T
σ*A*(300 K^4 - T_∞^4) + h_o*A*(300 K - T_∞) = -207.015 W
h_o = 5.719 kg/(s^3*K)
T(0, t + dt) == T(0, t) + (k*dt/(c_p*ρ*dx^2))*(T(dx, t) - T(0, t) + Q_in*dx/(k*A))
T(L, t + dt) == T(L, t) + (k*dt/(c_p*ρ*dx^2))*(T(L - dx, t) - T(L, t) + Q_out*dx/(k*A))
T(x, t + dt) == T(x, t) + (k*dt/(c_p*ρ*dx^2))*(T(x - dx, t) - 2*T(x, t) + T(x + dx, t))
T_lim = [
    295.372, 297.503, 298.873, 300.025, 301.018, 301.91, 302.725, 303.48, 304.187, 304.854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;
    295.372, 295.372, 296.133, 296.84, 297.551, 298.226, 298.874, 299.494, 300.089, 300.662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;
    295.372, 295.372, 295.372, 295.644, 295.974, 296.357, 296.76, 297.174, 297.593, 298.012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;
    295.372, 295.372, 295.372, 295.372, 295.469, 295.615, 295.806, 296.026, 296.269, 296.529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;
    295.372, 295.372, 295.372, 295.372, 295.372, 295.407, 295.469, 295.559, 295.673, 295.807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;
    295.372, 295.372, 295.372, 295.372, 295.372, 295.372, 295.385, 295.41, 295.451, 295.507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;
    295.372, 295.372, 295.372, 295.372, 295.372, 295.372, 295.372, 295.377, 295.387, 295.405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;
    295.372, 295.372, 295.372, 295.372, 295.372, 295.372, 295.372, 295.372, 295.374, 295.378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;
    295.372, 295.372, 295.372, 295.372, 295.372, 295.372, 295.372, 295.372, 295.372, 295.373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;
    295.372, 295.372, 295.372, 295.372, 295.372, 295.372, 295.372, 295.372, 295.372, 295.372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;
    295.372, 295.372, 295.372, 295.372, 295.372, 295.372, 295.372, 295.372, 295.372, 295.372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] K
# [3D plot: T_lim]
if x ≤ 0.125
    k ← k_ss
else if 0.125 < x < 1.125
    k ← k_ceramic
else
    k ← k_ss
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# Crank Nicholson Method
diffusionNumber := k_ceramic*dt/(c_p*ρ*dx^2) = 0.357209
# Less than 0.5 then it has met the stability criteria
r := diffusionNumber = 0.357209
T := 0
# Initialization
T :=
    for j ∈ 0, dt/timeu*tscale .. time/timeu*tscale
        for i ∈ 0, dx/disu*scale .. (L/disu)*scale
            T[i, j] ← T_∞
    T
T = [
    295.372, 295.372, 295.372, 295.372, 295.372, 295.372, 295.372, 295.372, 295.372, 295.372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;
    295.372, 295.372, 295.372, 295.372, 295.372, 295.372, 295.372, 295.372, 295.372, 295.372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;
    295.372, 295.372, 295.372, 295.372, 295.372, 295.372, 295.372, 295.372, 295.372, 295.372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;
    295.372, 295.372, 295.372, 295.372, 295.372, 295.372, 295.372, 295.372, 295.372, 295.372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;
    295.372, 295.372, 295.372, 295.372, 295.372, 295.372, 295.372, 295.372, 295.372, 295.372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;
    295.372, 295.372, 295.372, 295.372, 295.372, 295.372, 295.372, 295.372, 295.372, 295.372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;
    295.372, 295.372, 295.372, 295.372, 295.372, 295.372, 295.372, 295.372, 295.372, 295.372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;
    295.372, 295.372, 295.372, 295.372, 295.372, 295.372, 295.372, 295.372, 295.372, 295.372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;
    295.372, 295.372, 295.372, 295.372, 295.372, 295.372, 295.372, 295.372, 295.372, 295.372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;
    295.372, 295.372, 295.372, 295.372, 295.372, 295.372, 295.372, 295.372, 295.372, 295.372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;
    295.372, 295.372, 295.372, 295.372, 295.372, 295.372, 295.372, 295.372, 295.372, 295.372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] K
AA :=
    for j ∈ 0, dx/disu*scale .. (L/disu)*scale - 2
        for i ∈ 0, dx/disu*scale .. (L/disu)*scale - 2
            if i == j
                T[i, j] ← 1 + r
            else if i == j + 1
                T[i, j] ← -0.5*r
            else if i == j - 1
                T[i, j] ← -0.5*r
            else
                T[i, j] ← 0
    T
AA = [
    1.35721, -0.178605, 0, 0, 0, 0, 0, 0, 0;
    -0.178605, 1.35721, -0.178605, 0, 0, 0, 0, 0, 0;
    0, -0.178605, 1.35721, -0.178605, 0, 0, 0, 0, 0;
    0, 0, -0.178605, 1.35721, -0.178605, 0, 0, 0, 0;
    0, 0, 0, -0.178605, 1.35721, -0.178605, 0, 0, 0;
    0, 0, 0, 0, -0.178605, 1.35721, -0.178605, 0, 0;
    0, 0, 0, 0, 0, -0.178605, 1.35721, -0.178605, 0;
    0, 0, 0, 0, 0, 0, -0.178605, 1.35721, -0.178605;
    0, 0, 0, 0, 0, 0, 0, -0.178605, 1.35721
]
BB :=
    for j ∈ 0, dx/disu*scale .. (L/disu)*scale - 2
        for i ∈ 0, dx/disu*scale .. (L/disu)*scale - 2
            if i == j
                T[i, j] ← 1 - r
            else if i == j + 1
                T[i, j] ← 0.5*r
            else if i == j - 1
                T[i, j] ← 0.5*r
            else
                T[i, j] ← 0
    T
# Ax=B
BB = [
    0.642791, 0.178605, 0, 0, 0, 0, 0, 0, 0;
    0.178605, 0.642791, 0.178605, 0, 0, 0, 0, 0, 0;
    0, 0.178605, 0.642791, 0.178605, 0, 0, 0, 0, 0;
    0, 0, 0.178605, 0.642791, 0.178605, 0, 0, 0, 0;
    0, 0, 0, 0.178605, 0.642791, 0.178605, 0, 0, 0;
    0, 0, 0, 0, 0.178605, 0.642791, 0.178605, 0, 0;
    0, 0, 0, 0, 0, 0.178605, 0.642791, 0.178605, 0;
    0, 0, 0, 0, 0, 0, 0.178605, 0.642791, 0.178605;
    0, 0, 0, 0, 0, 0, 0, 0.178605, 0.642791
]
bc :=
    for j ∈ 0, dx/disu*scale .. (L/disu)*scale - 2
        bc[j] ← 0 K
    bc
ss := [1; 2]
sss := stack(1, ss, 2) = [1; 1; 2; 2]
bc = [0; 0; 0; 0; 0; 0; 0; 0; 0] K
submatrix(sss[:, 0], 0, 0, 0, 0) = [1]
5 = [□]  # error: Missing term or expression.
T_CN :=
    for t ∈ 0, dt/timeu*tscale .. time/timeu*tscale
        Q_out ← σ*A*(T[L/disu*scale, t]^4 - T_∞^4) + h_o*A*(T[L/disu*scale, t] - T_∞)
        T[0, t + 1] ← T[0, t] + (k_ceramic*dt/(c_p*ρ*dx^2))*(T[1, t] - T[0, t] + Q_in*dx/(k_ceramic*A_i))
        T[L/disu*scale, t + 1] ← T[L/disu*scale, t] + (k_ceramic*dt/(c_p*ρ*dx^2))*(T[L/disu*scale - 1, t] - T[L/disu*scale, t] - Q_out*dx/(k_ceramic*A_i))
        bc[0, :] ← T[0, t + 1]
        bc[L/disu*scale - 2, :] ← T[L/disu*scale, t + 1]
        T_sub[:, t + 1] ← lsolve(AA, BB*submatrix(T[:, t], 1, L/disu*scale - 1, 0, 0) + r*bc)
        T[:, t + 1] ← stack(T[0, t + 1], T_sub[:, t + 1], T[L/disu*scale, t + 1])
    T
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error := |(T_lim[L/disu*scale, time/timeu*tscale] - T_CN[L/disu*scale, time/timeu*tscale])/T_lim[L/disu*scale, time/timeu*tscale]|*100 = 0.0343531
T_lim[L/disu*scale, time/timeu*tscale] = 296.2 K
T_CN = [
    295.372, 297.503, 299.077, 300.346, 301.429, 302.385, 303.249, 304.044, 304.782, 305.476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;
    295.372, 295.943, 296.666, 297.412, 298.14, 298.839, 299.508, 300.147, 300.759, 301.347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;
    295.372, 295.449, 295.662, 295.975, 296.348, 296.756, 297.183, 297.618, 298.056, 298.492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;
    295.372, 295.382, 295.427, 295.521, 295.665, 295.851, 296.07, 296.314, 296.578, 296.856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;
    295.372, 295.374, 295.382, 295.404, 295.449, 295.518, 295.611, 295.726, 295.862, 296.016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;
    295.372, 295.372, 295.374, 295.379, 295.39, 295.412, 295.445, 295.492, 295.553, 295.627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;
    295.372, 295.372, 295.372, 295.373, 295.376, 295.382, 295.393, 295.409, 295.433, 295.465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;
    295.372, 295.372, 295.372, 295.372, 295.373, 295.374, 295.378, 295.383, 295.391, 295.404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;
    295.372, 295.372, 295.372, 295.372, 295.372, 295.373, 295.374, 295.375, 295.378, 295.382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;
    295.372, 295.372, 295.372, 295.372, 295.372, 295.372, 295.373, 295.373, 295.374, 295.375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;
    295.372, 295.372, 295.372, 295.372, 295.372, 295.372, 295.372, 295.372, 295.373, 295.373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] K
T_CN[L/disu*scale, time/timeu*tscale] = 296.301 K
# [3D plot: T_CN]
# [3D plot: T_lim]
